2015-05-20
17:06
$PROBLEM    PK model
$INPUT      ID TIME DV AMT AGE WT
$DATA       est.dat IGNORE=@
$SUBROUTINE ADVAN1 TRANS2
$PK

 TVCL  = THETA(1) + ETA(1)
 TVV   = THETA(2) + ETA(2)
 TM50  = THETA(3)
 HL    = 0.75;THETA(4)

 LCL    = TVCL+LOG(WT/70)*HL+LOG((AGE)/(AGE + TM50))
 LV     = TVV +LOG((WT/70))
 CL = EXP(LCL)
 V = EXP(LV)
 SC    = V

$ERROR
 IPRED = F
 Y= IPRED*(1+EPS(1)) + EPS(2)

;$SIM (1000) ONLYSIM NSUBPROBLEM=1
;$TABLE ID TIME DV AMT FILE=outA.tab NOAPPEND NOPRINT NOHEADER
$THETA  (0,1,100) ; TVCL
 (0,3,100) ; TVV
 (0,150,500) ; TM50
;(0,1.245)            ; HL
$OMEGA  0.05
 0.05
$SIGMA  0.015
 0.0001  FIX
$ESTIMATION METHOD=1 INTER MAXEVAL=0 SIG=3 PRINT=5 NOABORT POSTHOC
$COVARIANCE UNCONDITIONAL
;$COV MATRIX=S UNCONDITIONAL

NM-TRAN MESSAGES

1NONLINEAR MIXED EFFECTS MODEL PROGRAM (NONMEM) VERSION 7.3.0
 ORIGINALLY DEVELOPED BY STUART BEAL, LEWIS SHEINER, AND ALISON BOECKMANN
 CURRENT DEVELOPERS ARE ROBERT BAUER, ICON DEVELOPMENT SOLUTIONS,
 AND ALISON BOECKMANN. IMPLEMENTATION, EFFICIENCY, AND STANDARDIZATION
 PERFORMED BY NOUS INFOSYSTEMS.
 PROBLEM NO.:         1
 PK model
 TOT. NO. OF OBS RECS:      545
 TOT. NO. OF INDIVIDUALS:    109
 ONE COMPARTMENT MODEL (ADVAN1)
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 #TBLN:      1
 #METH: First Order Conditional Estimation with Interaction (Evaluation)
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
0R MATRIX ALGORITHMICALLY SINGULAR
 AND ALGORITHMICALLY NON-POSITIVE-SEMIDEFINITE
0R MATRIX IS OUTPUT
0COVARIANCE STEP ABORTED
 Elapsed covariance time in seconds:     1.86

 ********************         FIRST ORDER CONDITIONAL ESTIMATION WITH INTERACTION (EVALUATION)       ********************
 #OBJT:**************                       MINIMUM VALUE OF OBJECTIVE FUNCTION                      ********************
 #OBJV:********************************************     1945.880       **************************************************

 ********************         FIRST ORDER CONDITIONAL ESTIMATION WITH INTERACTION (EVALUATION)       ********************
 ********************                             FINAL PARAMETER ESTIMATE                           ********************

 THETA - VECTOR OF FIXED EFFECTS PARAMETERS   *********
         TH 1      TH 2      TH 3
         1.00E+00  3.00E+00  1.50E+02

 OMEGA - COV MATRIX FOR RANDOM EFFECTS - ETAS  ********
            ETA1      ETA2
 ETA1
+        5.00E-02
 ETA2
+        0.00E+00  5.00E-02

 SIGMA - COV MATRIX FOR RANDOM EFFECTS - EPSILONS  ****
            EPS1      EPS2
 EPS1
+        1.50E-02
 EPS2
+        0.00E+00  1.00E-04

 OMEGA - CORR MATRIX FOR RANDOM EFFECTS - ETAS  *******
            ETA1      ETA2
 ETA1
+        2.24E-01
 ETA2
+        0.00E+00  2.24E-01

 SIGMA - CORR MATRIX FOR RANDOM EFFECTS - EPSILONS  ***
            EPS1      EPS2
 EPS1
+        1.22E-01
 EPS2
+        0.00E+00  1.00E-02
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 #CPUT: Total CPU Time in Seconds,        1.763
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