2015-06-29
14:11
$PROBLEM    PK model
$INPUT      ID TIME DV AMT AGE WT DROP DROP
$DATA      est.dat IGNORE=@
$SUBROUTINE ADVAN1 TRANS2
$PK

 LCL  = THETA(1) + ETA(1)
 LV   = THETA(2)  + ETA(2)
 ;BASCL = THETA(3)
 ;EMAX  = THETA(4)
 ;E50   = THETA(5)
 ;HL    = THETA(6)

 ;CL    = BASCL+TVCL*((EMAX*WT**HL)/(E50**HL+WT**HL))
 ;V     = TVV *(WT/70)
 CL = EXP(LCL)
 V = EXP(LV)
 SC    = V

$THETA  (0,1) ; TVCL
 (0,3) ; TVV
; (0, 1, 10)            ; BASCL
; (0, 2, 10)            ; EMAX
; (0, 25,  200)         ; E50
; (0, 5, 20)            ; HL
$OMEGA  0.05
 0.05
$SIGMA  0.015
 0.0001  FIX
$ERROR
 IPRED = F
 Y= IPRED*(1+EPS(1)) + EPS(2)

;$SIM (1000) ONLYSIM NSUBPROBLEM=1
$TABLE      ID TIME DV AMT CL LCL FILE=NCA_PARAMS.tab NOAPPEND NOPRINT
            NOHEADER
$ESTIMATION METHOD=1 INTER MAXEVAL=9999 SIG=3 PRINT=5 NOABORT POSTHOC
$COVARIANCE UNCONDITIONAL

NM-TRAN MESSAGES

1NONLINEAR MIXED EFFECTS MODEL PROGRAM (NONMEM) VERSION 7.3.0
 ORIGINALLY DEVELOPED BY STUART BEAL, LEWIS SHEINER, AND ALISON BOECKMANN
 CURRENT DEVELOPERS ARE ROBERT BAUER, ICON DEVELOPMENT SOLUTIONS,
 AND ALISON BOECKMANN. IMPLEMENTATION, EFFICIENCY, AND STANDARDIZATION
 PERFORMED BY NOUS INFOSYSTEMS.
 PROBLEM NO.:         1
 PK model
 TOT. NO. OF OBS RECS:     5000
 TOT. NO. OF INDIVIDUALS:   1000
 ONE COMPARTMENT MODEL (ADVAN1)
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 #TBLN:      1
 #METH: First Order Conditional Estimation with Interaction
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
 #TERM:
0MINIMIZATION SUCCESSFUL
 NO. OF FUNCTION EVALUATIONS USED:       92
 NO. OF SIG. DIGITS IN FINAL EST.:  3.7

 ETABAR IS THE ARITHMETIC MEAN OF THE ETA-ESTIMATES,
 AND THE P-VALUE IS GIVEN FOR THE NULL HYPOTHESIS THAT THE TRUE MEAN IS 0.

 ETABAR:         1.8288E-04 -2.7230E-03
 SE:             7.3567E-03  7.3433E-03
 N:                    1000        1000

 P VAL.:         9.8017E-01  7.1077E-01

 ETAshrink(%):   2.7480E+00  4.8123E+00
 EBVshrink(%):   2.5772E+00  4.6066E+00
 EPSshrink(%):   1.9940E+01  1.9940E+01

 #TERE:
 Elapsed estimation time in seconds:     8.50
 Elapsed covariance time in seconds:     6.44

 ********************               FIRST ORDER CONDITIONAL ESTIMATION WITH INTERACTION              ********************
 #OBJT:**************                       MINIMUM VALUE OF OBJECTIVE FUNCTION                      ********************
 #OBJV:********************************************    18011.812       **************************************************

 ********************               FIRST ORDER CONDITIONAL ESTIMATION WITH INTERACTION              ********************
 ********************                             FINAL PARAMETER ESTIMATE                           ********************

 THETA - VECTOR OF FIXED EFFECTS PARAMETERS   *********
         TH 1      TH 2
         1.01E+00  3.11E+00

 OMEGA - COV MATRIX FOR RANDOM EFFECTS - ETAS  ********
            ETA1      ETA2
 ETA1
+        5.73E-02
 ETA2
+        0.00E+00  5.96E-02

 SIGMA - COV MATRIX FOR RANDOM EFFECTS - EPSILONS  ****
            EPS1      EPS2
 EPS1
+        1.52E-02
 EPS2
+        0.00E+00  1.00E-04

 OMEGA - CORR MATRIX FOR RANDOM EFFECTS - ETAS  *******
            ETA1      ETA2
 ETA1
+        2.39E-01
 ETA2
+        0.00E+00  2.44E-01

 SIGMA - CORR MATRIX FOR RANDOM EFFECTS - EPSILONS  ***
            EPS1      EPS2
 EPS1
+        1.23E-01
 EPS2
+        0.00E+00  1.00E-02

 ********************               FIRST ORDER CONDITIONAL ESTIMATION WITH INTERACTION              ********************
 ********************                            STANDARD ERROR OF ESTIMATE                          ********************

 THETA - VECTOR OF FIXED EFFECTS PARAMETERS   *********
         TH 1      TH 2
         7.86E-03  8.20E-03

 OMEGA - COV MATRIX FOR RANDOM EFFECTS - ETAS  ********
            ETA1      ETA2
 ETA1
+        2.60E-03
 ETA2
+       .........  2.95E-03

 SIGMA - COV MATRIX FOR RANDOM EFFECTS - EPSILONS  ****
            EPS1      EPS2
 EPS1
+        3.99E-04
 EPS2
+       ......... .........

 OMEGA - CORR MATRIX FOR RANDOM EFFECTS - ETAS  *******
            ETA1      ETA2
 ETA1
+        5.43E-03
 ETA2
+       .........  6.05E-03

 SIGMA - CORR MATRIX FOR RANDOM EFFECTS - EPSILONS  ***
            EPS1      EPS2
 EPS1
+        1.62E-03
 EPS2
+       ......... .........

 ********************               FIRST ORDER CONDITIONAL ESTIMATION WITH INTERACTION              ********************
 ********************                          COVARIANCE MATRIX OF ESTIMATE                         ********************

            TH 1      TH 2      OM11      OM12      OM22      SG11      SG12      SG22
 TH 1
+        6.18E-05
 TH 2
+        1.59E-05  6.72E-05
 OM11
+       -8.25E-08  8.72E-07  6.75E-06
 OM12
+       ......... ......... ......... .........
 OM22
+        1.23E-07  2.91E-07  3.55E-08 .........  8.73E-06
 SG11
+        1.66E-07  8.55E-08 -2.02E-08 ......... -8.30E-08  1.59E-07
 SG12
+       ......... ......... ......... ......... ......... ......... .........
 SG22
+       ......... ......... ......... ......... ......... ......... ......... .........

 ********************               FIRST ORDER CONDITIONAL ESTIMATION WITH INTERACTION              ********************
 ********************                          CORRELATION MATRIX OF ESTIMATE                        ********************

            TH 1      TH 2      OM11      OM12      OM22      SG11      SG12      SG22
 TH 1
+        7.86E-03
 TH 2
+        2.47E-01  8.20E-03
 OM11
+       -4.04E-03  4.09E-02  2.60E-03
 OM12
+       ......... ......... ......... .........
 OM22
+        5.30E-03  1.20E-02  4.63E-03 .........  2.95E-03
 SG11
+        5.28E-02  2.62E-02 -1.95E-02 ......... -7.05E-02  3.99E-04
 SG12
+       ......... ......... ......... ......... ......... ......... .........
 SG22
+       ......... ......... ......... ......... ......... ......... ......... .........
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 #CPUT: Total CPU Time in Seconds,       15.569
