$PROB PK model
$INPUT ID TIME DV AMT AGE WT
$DATA est.dat IGNORE=@
$SUBROUTINES ADVAN1 TRANS2
$PK

 TVCL  = EXP(THETA(1))*EXP(ETA(1))
 TVV   = EXP(THETA(2))*EXP(ETA(2))
 TM50  = EXP(THETA(3))
 HL    = 0.75
 HILL  = EXP(THETA(4))

 CL    = TVCL*(WT/70)**HL*((AGE**HILL)/(AGE**HILL + TM50**HILL))
 V     = TVV *(WT/70)
  SC    = V

$THETA
 (0,  1,   10)                   ; TVCL
 (0,  3,   10)                   ; TVV
 (0, 3.6,  5)                  ; TM50
 (0,1.5,3.5)                  ; Maturation HILL

$OMEGA
 0.05
 0.05
$SIGMA
 0.015
 0.0001 FIX
$ERROR
 IPRED = F
 Y= IPRED*(1+EPS(1)) + EPS(2)

;$SIM (1000) ONLYSIM NSUBPROBLEM=1
;$TABLE ID TIME DV AMT FILE=outA.tab NOAPPEND NOPRINT NOHEADER
$EST METHOD=1 INTER MAXEVAL=9999 SIG=3 PRINT=5 NOABORT POSTHOC
$COV UNCONDITIONAL
;$COV MATRIX=S UNCONDITIONAL
