2016-09-01
11:56
$PROBLEM    PK model
$INPUT      ID TIME DV AMT AGE WT
$DATA      est.dat IGNORE=@
$SUBROUTINE ADVAN1 TRANS2
$PK

 TVCL  = EXP(THETA(1))*EXP(ETA(1))
 TVV   = EXP(THETA(2))*EXP(ETA(2))
 TM50  = EXP(THETA(3))
 HL    = 0.75
 HILL  = EXP(THETA(4))

 CL    = TVCL*(WT/70)**HL*((AGE**HILL)/(AGE**HILL + TM50**HILL))
 V     = TVV *(WT/70)
  SC    = V

$THETA  (0,1,10) ; TVCL
 (0,3,10) ; TVV
 (0,3.6,5) ; TM50
 (0,1.5,3.5) ; Maturation HILL
$OMEGA  0.05
 0.05
$SIGMA  0.015
 0.0001  FIX
$ERROR
 IPRED = F
 Y= IPRED*(1+EPS(1)) + EPS(2)

;$SIM (1000) ONLYSIM NSUBPROBLEM=1
;$TABLE ID TIME DV AMT FILE=outA.tab NOAPPEND NOPRINT NOHEADER
$ESTIMATION METHOD=1 INTER MAXEVAL=9999 SIG=3 PRINT=5 NOABORT POSTHOC
$COVARIANCE UNCONDITIONAL
;$COV MATRIX=S UNCONDITIONAL

NM-TRAN MESSAGES

1NONLINEAR MIXED EFFECTS MODEL PROGRAM (NONMEM) VERSION 7.3.0
 ORIGINALLY DEVELOPED BY STUART BEAL, LEWIS SHEINER, AND ALISON BOECKMANN
 CURRENT DEVELOPERS ARE ROBERT BAUER, ICON DEVELOPMENT SOLUTIONS,
 AND ALISON BOECKMANN. IMPLEMENTATION, EFFICIENCY, AND STANDARDIZATION
 PERFORMED BY NOUS INFOSYSTEMS.
 PROBLEM NO.:         1
 PK model
 TOT. NO. OF OBS RECS:      560
 TOT. NO. OF INDIVIDUALS:    112
 ONE COMPARTMENT MODEL (ADVAN1)
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 #TBLN:      1
 #METH: First Order Conditional Estimation with Interaction
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
 #TERM:
0MINIMIZATION SUCCESSFUL
 NO. OF FUNCTION EVALUATIONS USED:      217
 NO. OF SIG. DIGITS IN FINAL EST.:  5.2

 ETABAR IS THE ARITHMETIC MEAN OF THE ETA-ESTIMATES,
 AND THE P-VALUE IS GIVEN FOR THE NULL HYPOTHESIS THAT THE TRUE MEAN IS 0.

 ETABAR:        -6.4605E-05 -2.3146E-03
 SE:             2.2457E-02  2.2933E-02
 N:                     112         112

 P VAL.:         9.9770E-01  9.1961E-01

 ETAshrink(%):   2.1785E+00  3.9269E+00
 EBVshrink(%):   2.4242E+00  4.1269E+00
 EPSshrink(%):   1.9750E+01  1.9750E+01

 #TERE:
 Elapsed estimation time in seconds:     2.66
 Elapsed covariance time in seconds:     3.14

 ********************               FIRST ORDER CONDITIONAL ESTIMATION WITH INTERACTION              ********************
 #OBJT:**************                       MINIMUM VALUE OF OBJECTIVE FUNCTION                      ********************
 #OBJV:********************************************     1897.130       **************************************************

 ********************               FIRST ORDER CONDITIONAL ESTIMATION WITH INTERACTION              ********************
 ********************                             FINAL PARAMETER ESTIMATE                           ********************

 THETA - VECTOR OF FIXED EFFECTS PARAMETERS   *********
         TH 1      TH 2      TH 3      TH 4
         9.78E-01  2.97E+00  3.41E+00  8.44E-01

 OMEGA - COV MATRIX FOR RANDOM EFFECTS - ETAS  ********
            ETA1      ETA2
 ETA1
+        5.96E-02
 ETA2
+        0.00E+00  6.44E-02

 SIGMA - COV MATRIX FOR RANDOM EFFECTS - EPSILONS  ****
            EPS1      EPS2
 EPS1
+        1.46E-02
 EPS2
+        0.00E+00  1.00E-04

 OMEGA - CORR MATRIX FOR RANDOM EFFECTS - ETAS  *******
            ETA1      ETA2
 ETA1
+        2.44E-01
 ETA2
+        0.00E+00  2.54E-01

 SIGMA - CORR MATRIX FOR RANDOM EFFECTS - EPSILONS  ***
            EPS1      EPS2
 EPS1
+        1.21E-01
 EPS2
+        0.00E+00  1.00E-02

 ********************               FIRST ORDER CONDITIONAL ESTIMATION WITH INTERACTION              ********************
 ********************                            STANDARD ERROR OF ESTIMATE                          ********************

 THETA - VECTOR OF FIXED EFFECTS PARAMETERS   *********
         TH 1      TH 2      TH 3      TH 4
         2.56E-02  2.53E-02  1.09E+00  1.62E+00

 OMEGA - COV MATRIX FOR RANDOM EFFECTS - ETAS  ********
            ETA1      ETA2
 ETA1
+        8.80E-03
 ETA2
+       .........  9.81E-03

 SIGMA - COV MATRIX FOR RANDOM EFFECTS - EPSILONS  ****
            EPS1      EPS2
 EPS1
+        1.08E-03
 EPS2
+       ......... .........

 OMEGA - CORR MATRIX FOR RANDOM EFFECTS - ETAS  *******
            ETA1      ETA2
 ETA1
+        1.80E-02
 ETA2
+       .........  1.93E-02

 SIGMA - CORR MATRIX FOR RANDOM EFFECTS - EPSILONS  ***
            EPS1      EPS2
 EPS1
+        4.46E-03
 EPS2
+       ......... .........

 ********************               FIRST ORDER CONDITIONAL ESTIMATION WITH INTERACTION              ********************
 ********************                          COVARIANCE MATRIX OF ESTIMATE                         ********************

            TH 1      TH 2      TH 3      TH 4      OM11      OM12      OM22      SG11      SG12      SG22
 TH 1
+        6.54E-04
 TH 2
+        7.56E-05  6.38E-04
 TH 3
+       -1.77E-03  9.75E-04  1.19E+00
 TH 4
+       -5.22E-03  1.74E-03  1.76E+00  2.64E+00
 OM11
+       -1.01E-06  1.60E-05  5.33E-04  7.48E-04  7.75E-05
 OM12
+       ......... ......... ......... ......... ......... .........
 OM22
+       -7.87E-07 -1.02E-04 -2.21E-04 -4.87E-04  1.01E-05 .........  9.63E-05
 SG11
+       -4.44E-07  2.54E-06 -1.48E-04 -2.30E-04 -6.14E-07 .........  4.61E-07  1.16E-06
 SG12
+       ......... ......... ......... ......... ......... ......... ......... ......... .........
 SG22
+       ......... ......... ......... ......... ......... ......... ......... ......... ......... .........

 ********************               FIRST ORDER CONDITIONAL ESTIMATION WITH INTERACTION              ********************
 ********************                          CORRELATION MATRIX OF ESTIMATE                        ********************

            TH 1      TH 2      TH 3      TH 4      OM11      OM12      OM22      SG11      SG12      SG22
 TH 1
+        2.56E-02
 TH 2
+        1.17E-01  2.53E-02
 TH 3
+       -6.35E-02  3.54E-02  1.09E+00
 TH 4
+       -1.26E-01  4.24E-02  9.92E-01  1.62E+00
 OM11
+       -4.49E-03  7.20E-02  5.55E-02  5.23E-02  8.80E-03
 OM12
+       ......... ......... ......... ......... ......... .........
 OM22
+       -3.14E-03 -4.12E-01 -2.06E-02 -3.05E-02  1.17E-01 .........  9.81E-03
 SG11
+       -1.61E-02  9.34E-02 -1.26E-01 -1.32E-01 -6.48E-02 .........  4.36E-02  1.08E-03
 SG12
+       ......... ......... ......... ......... ......... ......... ......... ......... .........
 SG22
+       ......... ......... ......... ......... ......... ......... ......... ......... ......... .........
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 #CPUT: Total CPU Time in Seconds,        5.491
