$PROBLEM    PK model
$INPUT      ID TIME DV AMT AGE WT
$DATA      est.dat IGNORE=@
$SUBROUTINE ADVAN1 TRANS2
$PK

 CL  = EXP(THETA(1))*EXP(ETA(1))
 V   = EXP(THETA(2))*EXP(ETA(2))
 SC    = V

$THETA  (0,1) ; TVCL
 (0,3) ; TVV
$OMEGA  0.05
 0.05
$SIGMA  0.015
 0.0001  FIX
$ERROR
 IPRED = F
 Y= IPRED*(1+EPS(1)) + EPS(2)

;$SIM (1000) ONLYSIM NSUBPROBLEM=1
;$TABLE ID TIME DV AMT FILE=outA.tab NOAPPEND NOPRINT NOHEADER
$ESTIMATION METHOD=1 INTER MAXEVAL=9999 SIG=3 PRINT=5 NOABORT POSTHOC
$COVARIANCE UNCONDITIONAL
