2016-09-01
11:52
$PROBLEM    PK model
$INPUT      ID TIME DV AMT AGE WT
$DATA      est.dat IGNORE=@
$SUBROUTINE ADVAN1 TRANS2
$PK

 CL  = EXP(THETA(1))*EXP(ETA(1))
 V   = EXP(THETA(2))*EXP(ETA(2))
 SC    = V

$THETA  (0,1) ; TVCL
 (0,3) ; TVV
$OMEGA  0.05
 0.05
$SIGMA  0.015
 0.0001  FIX
$ERROR
 IPRED = F
 Y= IPRED*(1+EPS(1)) + EPS(2)

;$SIM (1000) ONLYSIM NSUBPROBLEM=1
;$TABLE ID TIME DV AMT FILE=outA.tab NOAPPEND NOPRINT NOHEADER
$ESTIMATION METHOD=1 INTER MAXEVAL=9999 SIG=3 PRINT=5 NOABORT POSTHOC
$COVARIANCE UNCONDITIONAL

NM-TRAN MESSAGES

1NONLINEAR MIXED EFFECTS MODEL PROGRAM (NONMEM) VERSION 7.3.0
 ORIGINALLY DEVELOPED BY STUART BEAL, LEWIS SHEINER, AND ALISON BOECKMANN
 CURRENT DEVELOPERS ARE ROBERT BAUER, ICON DEVELOPMENT SOLUTIONS,
 AND ALISON BOECKMANN. IMPLEMENTATION, EFFICIENCY, AND STANDARDIZATION
 PERFORMED BY NOUS INFOSYSTEMS.
 PROBLEM NO.:         1
 PK model
 TOT. NO. OF OBS RECS:      500
 TOT. NO. OF INDIVIDUALS:    100
 ONE COMPARTMENT MODEL (ADVAN1)
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 #TBLN:      1
 #METH: First Order Conditional Estimation with Interaction
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
 #TERM:
0MINIMIZATION SUCCESSFUL
 NO. OF FUNCTION EVALUATIONS USED:       87
 NO. OF SIG. DIGITS IN FINAL EST.:  3.2

 ETABAR IS THE ARITHMETIC MEAN OF THE ETA-ESTIMATES,
 AND THE P-VALUE IS GIVEN FOR THE NULL HYPOTHESIS THAT THE TRUE MEAN IS 0.

 ETABAR:        -8.9496E-06 -2.4445E-03
 SE:             2.6455E-02  2.6697E-02
 N:                     100         100

 P VAL.:         9.9973E-01  9.2704E-01

 ETAshrink(%):   1.6028E+00  3.1101E+00
 EBVshrink(%):   1.9347E+00  3.4101E+00
 EPSshrink(%):   2.0302E+01  2.0302E+01

 #TERE:
 Elapsed estimation time in seconds:     1.64
 Elapsed covariance time in seconds:     1.20

 ********************               FIRST ORDER CONDITIONAL ESTIMATION WITH INTERACTION              ********************
 #OBJT:**************                       MINIMUM VALUE OF OBJECTIVE FUNCTION                      ********************
 #OBJV:********************************************     1773.726       **************************************************

 ********************               FIRST ORDER CONDITIONAL ESTIMATION WITH INTERACTION              ********************
 ********************                             FINAL PARAMETER ESTIMATE                           ********************

 THETA - VECTOR OF FIXED EFFECTS PARAMETERS   *********
         TH 1      TH 2
         1.05E+00  3.07E+00

 OMEGA - COV MATRIX FOR RANDOM EFFECTS - ETAS  ********
            ETA1      ETA2
 ETA1
+        7.30E-02
 ETA2
+        0.00E+00  7.67E-02

 SIGMA - COV MATRIX FOR RANDOM EFFECTS - EPSILONS  ****
            EPS1      EPS2
 EPS1
+        1.41E-02
 EPS2
+        0.00E+00  1.00E-04

 OMEGA - CORR MATRIX FOR RANDOM EFFECTS - ETAS  *******
            ETA1      ETA2
 ETA1
+        2.70E-01
 ETA2
+        0.00E+00  2.77E-01

 SIGMA - CORR MATRIX FOR RANDOM EFFECTS - EPSILONS  ***
            EPS1      EPS2
 EPS1
+        1.19E-01
 EPS2
+        0.00E+00  1.00E-02

 ********************               FIRST ORDER CONDITIONAL ESTIMATION WITH INTERACTION              ********************
 ********************                            STANDARD ERROR OF ESTIMATE                          ********************

 THETA - VECTOR OF FIXED EFFECTS PARAMETERS   *********
         TH 1      TH 2
         2.78E-02  2.91E-02

 OMEGA - COV MATRIX FOR RANDOM EFFECTS - ETAS  ********
            ETA1      ETA2
 ETA1
+        1.26E-02
 ETA2
+       .........  1.23E-02

 SIGMA - COV MATRIX FOR RANDOM EFFECTS - EPSILONS  ****
            EPS1      EPS2
 EPS1
+        1.11E-03
 EPS2
+       ......... .........

 OMEGA - CORR MATRIX FOR RANDOM EFFECTS - ETAS  *******
            ETA1      ETA2
 ETA1
+        2.34E-02
 ETA2
+       .........  2.22E-02

 SIGMA - CORR MATRIX FOR RANDOM EFFECTS - EPSILONS  ***
            EPS1      EPS2
 EPS1
+        4.66E-03
 EPS2
+       ......... .........

 ********************               FIRST ORDER CONDITIONAL ESTIMATION WITH INTERACTION              ********************
 ********************                          COVARIANCE MATRIX OF ESTIMATE                         ********************

            TH 1      TH 2      OM11      OM12      OM22      SG11      SG12      SG22
 TH 1
+        7.72E-04
 TH 2
+        2.19E-04  8.46E-04
 OM11
+       -7.74E-07  3.36E-05  1.60E-04
 OM12
+       ......... ......... ......... .........
 OM22
+        2.44E-05 -8.79E-05  4.38E-05 .........  1.51E-04
 SG11
+        1.41E-07  3.59E-06 -2.06E-06 .........  1.08E-06  1.23E-06
 SG12
+       ......... ......... ......... ......... ......... ......... .........
 SG22
+       ......... ......... ......... ......... ......... ......... ......... .........

 ********************               FIRST ORDER CONDITIONAL ESTIMATION WITH INTERACTION              ********************
 ********************                          CORRELATION MATRIX OF ESTIMATE                        ********************

            TH 1      TH 2      OM11      OM12      OM22      SG11      SG12      SG22
 TH 1
+        2.78E-02
 TH 2
+        2.72E-01  2.91E-02
 OM11
+       -2.20E-03  9.15E-02  1.26E-02
 OM12
+       ......... ......... ......... .........
 OM22
+        7.14E-02 -2.46E-01  2.82E-01 .........  1.23E-02
 SG11
+        4.57E-03  1.11E-01 -1.47E-01 .........  7.92E-02  1.11E-03
 SG12
+       ......... ......... ......... ......... ......... ......... .........
 SG22
+       ......... ......... ......... ......... ......... ......... ......... .........
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 #CPUT: Total CPU Time in Seconds,        2.746
